// SBML level 3 version 1

model __main()

  // Compartments:
  compartment default_compartment = 1;

  // Species:
  species $dye_ext in default_compartment = 0;
  species dye in default_compartment = 0;
  species $X1 in default_compartment = 0;
  species rna in default_compartment = 0;
  species bound in default_compartment = 0;

  // Parameters:
  kt = 0;
  dil = 0;
  syn = 0;
  deg_rna = 0;
  kf = 0;
  kr = 0;
  deg_bound = 0;
  ci = 0;

  // Reactions:
  _J0: $dye_ext -> dye; kt*dye_ext;
  _J1: dye -> $dye_ext; kt*dye;
  _J2: dye -> ; dil*dye;
  _J3: $X1 -> rna; syn;
  _J4: rna -> ; (dil + deg_rna)*rna;
  _J5: rna + dye -> bound; kf*rna*dye;
  _J6: bound -> rna + dye; kr*bound;
  _J7: bound -> ; dil*bound;
  _J8: bound -> dye; deg_bound*bound;
end
